// Generated by CymDist to DSS Converter: CymDist2Dss.exe: version 1.3.0.9
// From a file exported from CymDist Version: 4.7 Revision: 7

!New Monitor.MDV_SUB_2  element=Transformer.MDV_SUB_2  terminal=2  mode=0
New Monitor.MDV_SUB_1  element=Transformer.MDV_SUB_1  terminal=2  mode=0
!New Monitor.THR_SUB_1  element=Transformer.THR_SUB_1  terminal=2  mode=0
!New Monitor.PIT_SUB_1  element=Transformer.PIT_SUB_1  terminal=2  mode=0
