clearAll
compile "D:\EDCou\Documents\OpenDSS\EPRITestCircuits\ckt5\Master_ckt5.dss"
set CPU=0
Set ShowExport = yes
Set Datapath="D:\EDCou\Documents\OpenDSS\EPRITestCircuits\ckt5"
Solve

Solve mode=Harmonics

Show Losses
Show Powers kVA Elem
Show EVentlog !Pour l'activation des banques de condensateur et des régulateurs
Export Monitors MDV_SUB_1 ! Va exporter les harmoniques dans un csv
